# LJ benchmark for DUMPI trace capture
units           lj
boundary        p p p
atom_style      atomic

# 32000 atoms in a box
lattice         fcc 0.8442
region          box block 0 20 0 20 0 20
create_box      1 box
create_atoms    1 box

mass            1 1.0

pair_style      lj/cut 2.5
pair_coeff      1 1 1.0 1.0 2.5

velocity        all create 1.0 12345

neighbor        0.3 bin
neigh_modify    delay 0 every 1

fix             1 all nve

thermo          10
thermo_style    custom step temp pe ke etotal press vol

dump            1 all custom 100 dump.lammpstrj id type x y z vx vy vz

run             100
